# OpenSim document version 30000
Model LHDL_hip_model_v2.1:
  length_units: meters
  force_units: N
  gravity: 0 -9.80665 0
  credits:
    "Luca Modenese for the building the model. The LHDL consortium (Istituto Ortopedico Rizzoli and the Université Libre de Bruxelles) for providing the data."
  BodySet:
    Body ground: mass=0 mass_center=(0 0 0) inertia_xx=1 inertia_yy=1 inertia_zz=1
    Body pelvis: mass=13.09268 mass_center=(0.237777 0.250863 -0.371124) inertia_xx=0.09791833 inertia_yy=0.1427595
        inertia_zz=0.1369189 inertia_xy=-7.40433e-5 inertia_xz=0.001303098 inertia_yz=-0.003299664
        meshes=.\geometry\LHDL_pelvis.vtp
      CustomJoint ground_pelvis: parent_body=ground location_in_parent=(0 0 0) location=(0.238855 0.180177 -0.357605)
          orientation=(-2.77372 -1.56193 1.80849)
        Coordinate pelvis_tilt: motion_type=rotational range=(-3.141593 3.141593)
        Coordinate pelvis_list: motion_type=rotational range=(-3.141593 3.141593)
        Coordinate pelvis_rotation: motion_type=rotational range=(-3.141593 3.141593)
        Coordinate pelvis_tx: motion_type=translational range=(-2.5 2.5)
        Coordinate pelvis_ty: motion_type=translational range=(-2.5 2.5)
        Coordinate pelvis_tz: motion_type=translational range=(-2.5 2.5)
        SpatialTransform:
          TransformAxis rotation1: coordinates=pelvis_tilt axis=(0 0 1) LinearFunction(coefficients=1 0)
          TransformAxis rotation2: coordinates=pelvis_list axis=(1 0 0) LinearFunction(coefficients=1 0)
          TransformAxis rotation3: coordinates=pelvis_rotation axis=(0 1 0) LinearFunction(coefficients=1 0)
          TransformAxis translation1: coordinates=pelvis_tx axis=(1 0 0) LinearFunction(coefficients=1 0)
          TransformAxis translation2: coordinates=pelvis_ty axis=(0 1 0) LinearFunction(coefficients=1 0)
          TransformAxis translation3: coordinates=pelvis_tz axis=(0 0 1) LinearFunction(coefficients=1 0)
    Body femur_r: mass=7.845869 mass_center=(0.121032 0.274766 -0.592758) inertia_xx=0.1248956 inertia_yy=0.1231612
        inertia_zz=0.02549157 inertia_xy=-0.001218896 inertia_xz=-0.009591829 inertia_yz=-0.003519396
        meshes=.\geometry\LHDL_femur_r.vtp
      CustomJoint hip_r: parent_body=pelvis location_in_parent=(0.143478 0.243439 -0.43267)
          orientation_in_parent=(-2.77372 -1.56193 1.80849) location=(0.143478 0.243439 -0.432669)
          orientation=(-0.806673 -1.45075 -2.47682)
        Coordinate hip_flexion_r: motion_type=rotational range=(-0.1745329 1.570796)
        Coordinate hip_adduction_r: motion_type=rotational range=(-0.6981317 0.6981317)
        Coordinate hip_rotation_r: motion_type=rotational range=(-0.5235988 0.5235988)
        SpatialTransform: axes_held_at_zero=(translation1 translation2 translation3)
          TransformAxis rotation1: coordinates=hip_flexion_r axis=(0 0 1) LinearFunction(coefficients=1 0)
          TransformAxis rotation2: coordinates=hip_adduction_r axis=(1 0 0) LinearFunction(coefficients=1 0)
          TransformAxis rotation3: coordinates=hip_rotation_r axis=(0 1 0) LinearFunction(coefficients=1 0)
  ForceSet:
    Thelen2003Muscle [values shared by the 8 below unless stated]: min_control=0 max_control=1 max_isometric_force=1000
        optimal_fiber_length=0.1 tendon_slack_length=0.2 pennation_angle_at_optimal=0 [radians]
    Thelen2003Muscle glut_max1_r:
      PathPoint glut_max1_r orig: pelvis (0.175033 0.296407 -0.318453)
      PathPoint glut_max1_r via 1: pelvis (0.142835 0.306339 -0.377371)
      PathPoint glut_max1_r via 2: femur_r (0.104159 0.29852 -0.45307)
      PathPoint glut_max1_r ins: femur_r (0.100125 0.284277 -0.481922)
    Thelen2003Muscle glut_max2_r:
      PathPoint glut_max2_r orig: pelvis (0.181345 0.308471 -0.362065)
      PathPoint glut_max2_r via 1: pelvis (0.138605 0.31 -0.431215)
      PathPoint glut_max2_r via 2: femur_r (0.112513 0.29824 -0.481296)
      PathPoint glut_max2_r ins: femur_r (0.105028 0.280603 -0.527382)
    Thelen2003Muscle glut_max3_r:
      PathPoint glut_max3_r orig: pelvis (0.219052 0.332869 -0.43102)
      PathPoint glut_max3_r via 1: pelvis (0.178071 0.317074 -0.482233)
      PathPoint glut_max3_r via 2: femur_r (0.125745 0.289659 -0.532528)
      PathPoint glut_max3_r ins: femur_r (0.106083 0.276279 -0.567094)
    Thelen2003Muscle glut_med1_r:
      PathPoint glut_med1_r orig: pelvis (0.160261 0.282488 -0.358209)
      PathPoint glut_med1_r ins: femur_r (0.0879712 0.273888 -0.431794)
    Thelen2003Muscle glut_med2_r:
      PathPoint glut_med2_r orig: pelvis (0.143598 0.262559 -0.307465)
      PathPoint glut_med2_r ins: femur_r (0.0868527 0.269325 -0.432109)
    Thelen2003Muscle glut_med3_r:
      PathPoint glut_med3_r orig: pelvis (0.103949 0.219092 -0.329008)
      PathPoint glut_med3_r ins: femur_r (0.0840174 0.266306 -0.438202)
    Thelen2003Muscle psoas_r:
      PathPoint psoas_r orig: pelvis (0.195586 0.249798 -0.284127)
      PathPoint psoas_r via 1: pelvis (0.166101 0.21297 -0.423452)
      ConditionalPathPoint default: pelvis (0.162508 0.220448 -0.443279) range=(-3.14159 0.698132)
          coordinate=hip_flexion_r
      PathPoint default: femur_r (0.143252 0.25784 -0.468482)
      PathPoint psoas_r ins: femur_r (0.136742 0.274754 -0.479965)
    Thelen2003Muscle iliacus_r:
      PathPoint iliacus_r orig: pelvis (0.143843 0.251496 -0.336433)
      PathPoint iliacus_r via 1: pelvis (0.150421 0.208639 -0.41599)
      ConditionalPathPoint default: pelvis (0.140381 0.212975 -0.444609) range=(-3.14159 0.942478)
          coordinate=hip_flexion_r
      PathPoint iliacus_r via 3: femur_r (0.13857 0.250306 -0.47268)
      PathPoint iliacus_r ins: femur_r (0.13319 0.267398 -0.483314)
  MarkerSet:
    Marker L_ASIS: pelvis (0.360151 0.181173 -0.35642)
    Marker R_ASIS: pelvis (0.117559 0.179181 -0.35879)
    Marker R_PSIS: pelvis (0.198585 0.320908 -0.337298)
    Marker L_PSIS: pelvis (0.279723 0.323154 -0.340768)
    Marker R_Med_Epi: femur_r (0.163134 0.279814 -0.830502)
    Marker R_Lat_Epi: femur_r (0.0833642 0.286761 -0.823844)
    Marker R_HJC: femur_r (0.143478 0.243439 -0.43267)
